# Задача №1: Найти локальный минимум функции f(x) := 2*x[0]^2 + x[0]*x[1] + x[1]^2 с помощью генетического алгоритма
# Последовательность вычислений
# Численный метод: реализовать алгоритм :
# 1. Построчно. Построить последовательность расчетных множеств и рассчитать значение функции в этих точках, проверить выполнение условий, т.о. определить точку минимума.
# 2. С использованием одной пользовательской функции
# График. построить трехмерный график, нанести точку локального минимума. Построить два типа графиков: 1. в виде поверхности. 2. в виде линий уровня
# Исходная информация в MathCAD
f(x) := 2*x[0]^2 + x[0]*x[1] + x[1]^2  # - исходная функция
n := 2  # - количество переменных
ε := 1  # - погрешность вычислений оптимума
Д_С_З := 100  # - диапазон случайных значений элементов генотипа
вся_популяция := 100  # - численность всей популяции
процент_обновления := 50  # - количество особей (в процентах от всей популяции), которое заменит новое поколение
количество_новой_популяции := ceil(вся_популяция*процент_обновления/100)
количество_новой_популяции = 50  # - количество особей, которое заменит новое поколение
число_родителей := вся_популяция  # - количество особей, из которых производится отбор
К_М := 5  # - коэффициент мутаций, число на которое изменяется каждый элемент генотипа
процент_мутаций := 50  # - количество особей (в процентах от всей популяции), которое мутирует
количество_мутирующих := ceil(вся_популяция*процент_мутаций/100)
количество_мутирующих = 50  # - количество особей, которое мутирует
# Вспомогательные функции
начальная_популяция(вся_популяция, Д_С_З, n, f) :=
    for i ∈ 0 .. вся_популяция - 1
        x ← runif(n, -Д_С_З, Д_С_З)
        for j ∈ 0 .. n - 1
            популяция[j + 1, i] ← x[j]
        популяция[0, i] ← f(x)
    популяция
# функция позволяет получить начальную случайно заданую популяцию численностью "вся_популяция", с генотипами, значения элементов которых варьируются от "-Д_С_З" до "Д_С_З", первыми элементами массивов являются значения функции "f" от соответствующих генотипов, для "n" переменных.
наследование(xp, f, n) :=
    p1 ← floor(rnd(4))
    if (p1 == 1) or (p1 == 2)
        for i ∈ 1 .. n
            x[i] ← (xp[0][i] + xp[1][i])/2
            y[i - 1] ← x[i]
    otherwise
        p2 ← 1 + rnd(1)
        if p1 == 0
            for i ∈ 1 .. n
                x[i] ← (xp[0][i]*p2 + xp[1][i]*(2 - p2))/2
                y[i - 1] ← x[i]
        otherwise
            for i ∈ 1 .. n
                x[i] ← (xp[1][i]*p2 + xp[0][i]*(2 - p2))/2
                y[i - 1] ← x[i]
    x[0] ← f(y)
    x
# функция позволяет получить массив "x" с генотипом потомка двух родителей, генотипы (вместе со значением функции) которых представлены в массиве особей "xp", и значение функции "f" первым элементом массива "x". Реализован механизм случайного доминирования генотипов родителей (на случайный вещественный коэфициент от 1 до 2): с вероятностью 1/4 доминирует "xp[0]", с вероятностью 1/4 доминирует "xp[1]", и с вероятностью 2/4 генотипы родителей одинаково влияют на генотип потомка((xp[0][i] + xp[1][i])/2).
скрещивание(популяция, количество_новой_популяции, вся_популяция, число_родителей, f, n) :=
    for ch ∈ количество_новой_популяции - 1 .. вся_популяция - 1
        xp[0] ← популяция[:, floor(rnd(число_родителей))]
        xp[1] ← популяция[:, floor(rnd(число_родителей))]
        while xp[1, 0] == xp[0, 0]
            xp[1] ← популяция[:, floor(rnd(число_родителей))]
        популяция[:, ch] ← наследование(xp, f, n)
    популяция
# функция позволяет получить новую популяцию с помощью функции "наследование", случайно выбирая родителей "xp"(пока они не будут разные) и заменяя одну из малоподходящих особей (столбцы "ch") на потомка выбранных родителей
мутация(популяция, количество_мутирующих, вся_популяция, К_М, f, n) :=
    c ← количество_мутирующих
    while c > 0
        c ← c - 1
        i ← floor(rnd(вся_популяция))
        for j ∈ 1 .. n
            p1 ← round(rnd(1))
            популяция[:, i][j] ← популяция[:, i][j] + ((-1)^p1*К_М)
            y[j - 1] ← популяция[:, i][j]
        популяция[:, i][0] ← f(y)
    популяция
# функция позволяет получить массив "x" - популяция с уже мутироваными особями, выбирая случаную особь и поочерёдно изменяя каждый элемент генотипа случайным образом на "К_М", после, высчитывая значение функции приспособления "f" для этой особи, и внося это значение в соответствующй столбец "x"
# Ход решения задачи в MathCAD
# 1. Построчная реализация алгоритма
## Шаг 0.1. Задать целевую функцию (приспособленности) для особей популяции
f(x) := 2*x[0]^2 + x[0]*x[1] + x[1]^2
k := 0
## Шаг 0.2. Создать начальную популяцию (и провести селекцию)
популяция := начальная_популяция(вся_популяция, Д_С_З, n, f)
популяция = [
    29778.7, 965.401, 8377.47, 3431.12, 24095.2, 17451.9, 18710.7, 3925.5, 8913.71, 6662.63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;
    -99.7463, 17.0012, 64.5675, 42.0991, -81.7177, 97.7017, -98.2155, 20.3528, -9.84282, 56.6638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;
    -61.3354, -29.9384, -65.1742, -39.2028, -70.5373, -76.1841, 6.33283, -66.7501, -88.5888, 3.97523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]
популяция := rsort(популяция, 0)
популяция = [
    3.06012, 121.673, 190.728, 329.89, 366.04, 408.5, 555.091, 663.595, 965.401, 1008.01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;
    -0.636027, 7.8683, 3.4037, 9.01763, -12.6634, -14.967, 16.9211, 14.6686, 17.0012, -23.9759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;
    1.8517, -7.58523, -14.7577, -18.205, 15.5733, 3.42401, -1.11035, 9.60831, -29.9384, 10.5613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]
# Начало цикла
## Шаг 0.3. Размножение (скрещивание)
популяция = [
    3.06012, 121.673, 190.728, 329.89, 366.04, 408.5, 555.091, 663.595, 965.401, 1008.01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;
    -0.636027, 7.8683, 3.4037, 9.01763, -12.6634, -14.967, 16.9211, 14.6686, 17.0012, -23.9759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;
    1.8517, -7.58523, -14.7577, -18.205, 15.5733, 3.42401, -1.11035, 9.60831, -29.9384, 10.5613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]
популяция := скрещивание(популяция, количество_новой_популяции, вся_популяция, число_родителей, f, n)
популяция = [
    3.06012, 121.673, 190.728, 329.89, 366.04, 408.5, 555.091, 663.595, 965.401, 1008.01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;
    -0.636027, 7.8683, 3.4037, 9.01763, -12.6634, -14.967, 16.9211, 14.6686, 17.0012, -23.9759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;
    1.8517, -7.58523, -14.7577, -18.205, 15.5733, 3.42401, -1.11035, 9.60831, -29.9384, 10.5613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]
## Шаг 0.4. Мутирование
популяция := мутация(популяция, количество_мутирующих, вся_популяция, К_М, f, n)
популяция = [
    71.859, 138.744, 365.572, 329.89, 383.055, 408.5, 555.091, 663.595, 965.401, 1008.01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;
    -5.63603, 2.8683, 8.4037, 9.01763, -7.66338, -14.967, 16.9211, 14.6686, 17.0012, -23.9759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;
    6.8517, -12.5852, -19.7577, -18.205, 20.5733, 3.42401, -1.11035, 9.60831, -29.9384, 10.5613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]
## Шаг 0.5. Селекция
популяция := rsort(популяция, 0)
популяция = [
    44.6785, 46.7523, 71.859, 78.7316, 110.522, 135.681, 138.744, 174.094, 257.99, 311.815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;
    3.84602, -1.38637, -5.63603, 3.32807, -2.02274, -8.37766, 2.8683, 6.74498, -3.95372, -13.1767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;
    -6.25807, -5.89383, 6.8517, -9.36783, -9.15532, 7.77446, -12.5852, -13.0925, 17.1635, 3.76509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]  # сохранение точки минимума
x_mins[:, k] := популяция[:, 0]
## Шаг 0.6. Проверка условия остановки
|популяция[0, 0]| < ε = 0  # условие остановки не выполняется - повторение цикла
## Шаг 1.3. Размножение (скрещивание)
k := 1
популяция = [
    44.6785, 46.7523, 71.859, 78.7316, 110.522, 135.681, 138.744, 174.094, 257.99, 311.815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;
    3.84602, -1.38637, -5.63603, 3.32807, -2.02274, -8.37766, 2.8683, 6.74498, -3.95372, -13.1767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;
    -6.25807, -5.89383, 6.8517, -9.36783, -9.15532, 7.77446, -12.5852, -13.0925, 17.1635, 3.76509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]
популяция := скрещивание(популяция, количество_новой_популяции, вся_популяция, число_родителей, f, n)
популяция = [
    44.6785, 46.7523, 71.859, 78.7316, 110.522, 135.681, 138.744, 174.094, 257.99, 311.815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;
    3.84602, -1.38637, -5.63603, 3.32807, -2.02274, -8.37766, 2.8683, 6.74498, -3.95372, -13.1767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;
    -6.25807, -5.89383, 6.8517, -9.36783, -9.15532, 7.77446, -12.5852, -13.0925, 17.1635, 3.76509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]
## Шаг 1.4. Мутирование
популяция := мутация(популяция, количество_мутирующих, вся_популяция, К_М, f, n)
популяция = [
    688.218, 46.7523, 133.734, 225.492, 110.522, 135.681, 82.7935, 390.731, 199.38, 311.815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;
    18.846, -1.38637, -0.636027, 8.32807, -2.02274, -8.37766, -2.1317, 11.745, -8.95372, -13.1767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;
    -1.25807, -5.89383, 11.8517, -14.3678, -9.15532, 7.77446, -7.58523, -18.0925, 12.1635, 3.76509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]
## Шаг 1.5. Селекция
популяция := rsort(популяция, 0)
популяция = [
    4.61864, 46.7523, 66.6747, 82.7935, 110.522, 114.505, 114.8, 121.669, 133.734, 135.681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;
    -1.26136, -1.38637, -1.06083, -2.1317, -2.02274, -7.37349, -1.2465, 2.15351, -0.636027, -8.37766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;
    -0.723697, -5.89383, 8.57438, -7.58523, -9.15532, -0.713263, 11.2101, 9.57936, 11.8517, 7.77446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]  # сохранение точки минимума
x_mins[:, k] := популяция[:, 0]
## Шаг 1.6. Проверка условия остановки
|популяция[0, 0]| < ε = 0  # условие остановки не выполняется - повторение цикла
## Шаг 2.3. Размножение (скрещивание)
k := 2
популяция = [
    4.61864, 46.7523, 66.6747, 82.7935, 110.522, 114.505, 114.8, 121.669, 133.734, 135.681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;
    -1.26136, -1.38637, -1.06083, -2.1317, -2.02274, -7.37349, -1.2465, 2.15351, -0.636027, -8.37766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;
    -0.723697, -5.89383, 8.57438, -7.58523, -9.15532, -0.713263, 11.2101, 9.57936, 11.8517, 7.77446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]
популяция := скрещивание(популяция, количество_новой_популяции, вся_популяция, число_родителей, f, n)
популяция = [
    4.61864, 46.7523, 66.6747, 82.7935, 110.522, 114.505, 114.8, 121.669, 133.734, 135.681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;
    -1.26136, -1.38637, -1.06083, -2.1317, -2.02274, -7.37349, -1.2465, 2.15351, -0.636027, -8.37766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;
    -0.723697, -5.89383, 8.57438, -7.58523, -9.15532, -0.713263, 11.2101, 9.57936, 11.8517, 7.77446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]
## Шаг 2.4. Мутирование
популяция := мутация(популяция, количество_мутирующих, вся_популяция, К_М, f, n)
популяция = [
    4.61864, 46.7523, 66.6747, 82.7935, 110.522, 409.541, 90.0518, 156.074, 71.859, 135.681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;
    -1.26136, -1.38637, -1.06083, -2.1317, -2.02274, -12.3735, 3.7535, 7.15351, -5.63603, -8.37766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;
    -0.723697, -5.89383, 8.57438, -7.58523, -9.15532, -5.71326, 6.21006, 4.57936, 6.8517, 7.77446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]
## Шаг 2.5. Селекция
популяция := rsort(популяция, 0)
популяция = [
    4.61864, 5.93491, 22.6682, 32.1037, 38.1233, 45.1474, 46.2944, 46.7523, 64.7848, 66.6747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;
    -1.26136, 1.7399, 3.50325, -4.18783, -4.64124, -4.87897, -4.5723, -1.38637, -3.13462, -1.06083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;
    -0.723697, -1.66821, -2.84289, 0.905497, 2.9736, 0.571377, -0.829781, -5.89383, 8.46583, 8.57438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]  # сохранение точки минимума
x_mins[:, k] := популяция[:, 0]
## Шаг 2.6. Проверка условия остановки
|популяция[0, 0]| < ε = 0  # условие остановки не выполняется - повторение цикла
## Шаг 3.3. Размножение (скрещивание)
k := 3
популяция = [
    4.61864, 5.93491, 22.6682, 32.1037, 38.1233, 45.1474, 46.2944, 46.7523, 64.7848, 66.6747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;
    -1.26136, 1.7399, 3.50325, -4.18783, -4.64124, -4.87897, -4.5723, -1.38637, -3.13462, -1.06083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;
    -0.723697, -1.66821, -2.84289, 0.905497, 2.9736, 0.571377, -0.829781, -5.89383, 8.46583, 8.57438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]
популяция := скрещивание(популяция, количество_новой_популяции, вся_популяция, число_родителей, f, n)
популяция = [
    4.61864, 5.93491, 22.6682, 32.1037, 38.1233, 45.1474, 46.2944, 46.7523, 64.7848, 66.6747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;
    -1.26136, 1.7399, 3.50325, -4.18783, -4.64124, -4.87897, -4.5723, -1.38637, -3.13462, -1.06083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;
    -0.723697, -1.66821, -2.84289, 0.905497, 2.9736, 0.571377, -0.829781, -5.89383, 8.46583, 8.57438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]
## Шаг 3.4. Мутирование
популяция := мутация(популяция, количество_мутирующих, вся_популяция, К_М, f, n)
популяция = [
    62.2292, 5.93491, 22.6682, 32.1037, 38.1233, 45.1474, 46.2944, 46.7523, 64.7848, 66.6747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;
    3.73864, 1.7399, 3.50325, -4.18783, -4.64124, -4.87897, -4.5723, -1.38637, -3.13462, -1.06083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;
    4.2763, -1.66821, -2.84289, 0.905497, 2.9736, 0.571377, -0.829781, -5.89383, 8.46583, 8.57438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]
## Шаг 3.5. Селекция
популяция := rsort(популяция, 0)
популяция = [
    0.972605, 1.94384, 3.75592, 5.93491, 12.0024, 21.7171, 22.6682, 23.7614, 32.1037, 35.0565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;
    0.381181, 0.16185, -1.21405, 1.7399, -0.959107, 0.895329, 3.50325, 1.05471, -4.18783, 4.43756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;
    -1.03814, -1.45861, 1.69173, -1.66821, 3.7033, 4.05947, -2.84289, 4.14326, 0.905497, -2.99054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]  # сохранение точки минимума
x_mins[:, k] := популяция[:, 0]
## Шаг 3.6. Проверка условия остановки
# условие остановки выполняется - конец итераций
# (поскольку итерации имеют случайный характер - условие остановки может не выполнятся, в таком случае следует совершить ещё одну итерацию или совершить перерасчёт документа "Ctrl"+"F9")
|популяция[0, 0]| < ε = 1
# 2. Расчет с использованием пользовательской функции генетический_алгоритм(вся_популяция, Д_С_З, n, f, ε, количество_новой_популяции, число_родителей, количество_мутирующих, К_М)
# Загрузить файл с описанием пользовательских функций
# [reference: Формализованное представление генетического алгоритма оптимизации.xmcd]
популяция_функ := генетический_алгоритм(вся_популяция, Д_С_З, n, f, ε, количество_новой_популяции, число_родителей, количество_мутирующих, К_М)[0, 0]
популяция_функ = [
    0.65155, 2.22388, 3.95499, 5.05594, 6.52529, 11.8287, 15.7285, 19.9342, 23.6896, 29.1165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;
    -0.559741, -0.0150595, 1.44096, 0.286691, 1.90421, -0.814602, -2.99415, -3.31347, -3.14518, 3.84082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;
    0.601208, -1.48361, -0.153623, 2.07298, -1.37611, 3.6734, 1.69673, 2.50571, 4.09813, -0.103663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]
# 3. Построение графиков и точек локального минимума
# Построить трехмерный график в виде контурных линий в диапазоне значений значений -5<x<5, -5<y<5, с шагом 0.1, нанести расчетные точки минимума, отредактировать график как показано ниже.
# Расчет исходной матрицы  для постоения графика функции, используя дискретный аргумент.
f(x, y) := 2*x^2 + x*y + y^2
x_min := -5
x_max := 5
y_max := 5
y_min := -5
Δy := 0.1
Δx := 0.1
Nx := (x_max - x_min)/Δx
Ny := (y_max - y_min)/Δy
i := 0 .. Nx
j := 0 .. Ny
x[i, j] := x_min + Δx*i
y[i, j] := y_min + Δy*j
M[i, j] := f(x[i, j], y[i, j])
# Преобразование точек. (Преобразование необходимы для построения точек на графике)
Point_2n(x, y, z) := [[x, x]; [y, y]; [z, z]]  # - функция преобразования
P_m := Point_2n(популяция[1, 0], популяция[2, 0], популяция[0, 0])  # - координаты точки минимума
u := 0 .. k
P_ex[u] := x_mins[1, u]
P_ey[u] := x_mins[2, u]  # - x, y и z составляющие рассчётных точек
P_ez[u] := x_mins[0, u]
# График поверхности исследуемой функции и полученных расчетных точек
# [component: inputs [((x, y, M), (P_ex, P_ey, P_ez), P_m), □, □]]
# График линий уровня исследуемой функции и полученных расчетных точек
# [component: inputs [((x, y, M), (P_ex, P_ey, P_ez), P_m), □, □]]
