# *выбор родителей так же возможен из только выживших: новая_популяция - 1 + floor(rnd(число_родителей)), а число родителей = начальная_популяция - новая_популяция
начальная_популяция(вся_популяция, Д_С_З, f, n) :=
    for i ∈ 0 .. вся_популяция - 1
        x ← runif(n, -Д_С_З, Д_С_З)
        for j ∈ 0 .. n - 1
            популяция[j + 1, i] ← x[j]
        популяция[0, i] ← f(x)
    популяция
наследование(xp, f, n) :=
    p1 ← floor(rnd(4))
    if (p1 == 1) or (p1 == 2)
        for i ∈ 1 .. n
            x[i] ← (xp[0][i] + xp[1][i])/2
            y[i - 1] ← x[i]
    otherwise
        p2 ← 1 + rnd(1)
        if p1 == 0
            for i ∈ 1 .. n
                x[i] ← (xp[0][i]*p2 + xp[1][i]*(2 - p2))/2
                y[i - 1] ← x[i]
        otherwise
            for i ∈ 1 .. n
                x[i] ← (xp[1][i]*p2 + xp[0][i]*(2 - p2))/2
                y[i - 1] ← x[i]
    x[0] ← f(y)
    x
мутация(популяция, количество_мутирующих, вся_популяция, К_М, f, n) :=
    c ← количество_мутирующих
    while c > 0
        c ← c - 1
        i ← floor(rnd(вся_популяция))
        for j ∈ 1 .. n
            p1 ← round(rnd(1))
            популяция[:, i][j] ← популяция[:, i][j] + ((-1)^p1*К_М)
            y[j - 1] ← популяция[:, i][j]
        популяция[:, i][0] ← f(y)
    популяция
# *Панмиксия
скрещивание(популяция, количество_новой_популяции, вся_популяция, число_родителей, f, n) :=
    for ch ∈ количество_новой_популяции - 1 .. вся_популяция - 1
        xp[0] ← популяция[:, floor(rnd(число_родителей))]
        xp[1] ← популяция[:, floor(rnd(число_родителей))]
        while xp[1, 0] == xp[0, 0]
            xp[1] ← популяция[:, floor(rnd(число_родителей))]
        популяция[:, ch] ← наследование(xp, f, n)
    популяция
# *rsort - Метод ранжирования
генетический_алгоритм(вся_популяция, Д_С_З, n, f, ε, количество_новой_популяции, число_родителей, количество_мутирующих, К_М) :=
    k ← 0
    популяция ← rsort(начальная_популяция(вся_популяция, Д_С_З, f, n), 0)
    mins[:, k] ← популяция[:, 0]
    while |популяция[0, 0]| > ε
        k ← k + 1
        популяция ← rsort(мутация(скрещивание(популяция, количество_новой_популяции, вся_популяция, число_родителей, f, n), количество_мутирующих, вся_популяция, К_М, f, n), 0)
        mins[:, k] ← популяция[:, 0]
    out ← [популяция, mins]
