# Задача №2: Найти локальный минимум функции Розенброка с помощью генетического алгоритма
# Исходная информация в MathCAD
f_V(x) := (1 - x[0])^2 + 100*(x[1] - x[0]^2)^2
# - исходная функция -
f(x, y) := (1 - x)^2 + 100*(y - x^2)^2
n := 2  # - количество переменных
# Расчитать минимум функции, используя метод LevenbergMarquardt и расчетный блок Given-MinErr
ε := 1  # - погрешность вычислений оптимума
x := 1.2
y := -5  # Начальные приближение координат минимума
Given
x ≥ 0
y ≥ 0
y ≤ 9 - x  # Ограничения на переменные
Д_С_З := 10  # - диапазон случайных значений элементов генотипа
d/dx(f(x, y)) == 0
d/dy(f(x, y)) == 0
вся_популяция := 100  # - численность всей популяции
Минерр := Minerr(x, y)
Минерр = [1; 1]  # Координаты точки минимума
процент_обновления := 50  # - количество особей (в процентах от всей популяции), которое заменит новое поколение
количество_новой_популяции := ceil(вся_популяция*процент_обновления/100)
количество_новой_популяции = 50  # - количество особей, которое заменит новое поколение
число_родителей := вся_популяция  # - количество особей, из которых производится отбор
К_М := 5  # - коэффициент мутаций, число на которое изменяется каждый элемент генотипа
процент_мутаций := 50  # - количество особей (в процентах от всей популяции), которое мутирует
количество_мутирующих := ceil(вся_популяция*процент_мутаций/100)
количество_мутирующих = 50  # - количество особей, которое мутирует
# 1. Расчет с использованием пользовательской функции генетический_алгоритм(вся_популяция, Д_С_З, n, f, ε, количество_новой_популяции, число_родителей, количество_мутирующих, К_М)
# Загрузить файл с описанием пользовательских функций
# [reference: Формализованное представление генетического алгоритма оптимизации.xmcd]
[популяция, mins] := генетический_алгоритм(100, 10, 2, f_V, 1, количество_новой_популяции, число_родителей, количество_мутирующих, 5)
популяция = [
    0.364996, 7.39804, 8.99283, 20.5965, 24.1933, 36.3754, 43.9546, 48.1812, 50.9548, 54.6911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;
    1.60323, -1.67915, 1.1525, -0.874655, -1.49265, 2.10445, -0.995926, -1.20646, 0.632004, 1.41851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;
    2.57368, 2.86648, 1.02875, 1.17833, 2.65203, 3.83581, 1.62409, 0.797428, 1.11231, 2.75051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]
mins = [
    4.41186, 9.93876, 2.28049, 2.28049, 3.16852, 1.92416, 1.92416, 1.56784, 1.33943, 1.0462, 1.0462, 1.0462, 1.0462, 0.364996;
    -0.0636027, -1.68865, 0.154678, 0.154678, -0.74584, 1.06203, 1.06203, 0.00322311, 0.394789, 1.0532, 1.0532, 1.0532, 1.0532, 1.60323;
    0.18517, 2.68692, 0.149062, 0.149062, 0.521556, 0.989332, 0.989332, 0.0757913, 0.254507, 1.21138, 1.21138, 1.21138, 1.21138, 2.57368
]
# 2. Построение графиков и точек локального минимума
# Построить трехмерный график в виде контурных линий в диапазоне значений значений -5<x<5, -5<y<5, с шагом 0.1, нанести расчетные точки минимума, отредактировать график как показано ниже.
# Расчет исходной матрицы  для постоения графика функции, используя дискретный аргумент.
x_min := -5
x_max := 5
y_max := 5
y_min := -5
Δy := 0.1
Δx := 0.1
Nx := (x_max - x_min)/Δx
Ny := (y_max - y_min)/Δy
i := 0 .. Nx
j := 0 .. Ny
x[i, j] := x_min + Δx*i
y[i, j] := y_min + Δy*j
M[i, j] := f(x[i, j], y[i, j])
# Преобразование точек. (Преобразование необходимы для построения точек на графике)
Point_2n(x, y, z) := [[x, x]; [y, y]; [z, z]]  # - функция преобразования
P_m := Point_2n(популяция[1, 0], популяция[2, 0], популяция[0, 0])  # - точка минимума алгоритма
# координаты точки минимума
u := 0 .. cols(mins) - 1
P_ex[u] := mins[1, u]
P_ey[u] := mins[2, u]  # - x, y и z составляющие рассчётных точек
P_ez[u] := mins[0, u]
P_rm := Point_2n(Минерр[0], Минерр[1], f(Минерр[0], Минерр[1]))  # - точка минимума
# График поверхности исследуемой функции и полученных расчетных точек
# [component: inputs (x, y, M), (P_ex, P_ey, P_ez), P_m, P_rm]
# График линий уровня исследуемой функции и полученных расчетных точек
# [component: inputs (x, y, M), (P_ex, P_ey, P_ez), P_m, P_rm]
