# Задача №3: Найти локальный минимум функции Химмельблау с помощью генетического алгоритма
# Исходная информация в MathCAD
f_V(x) := (x[0]^2 + x[1] - 11)^2 + (x[0] + x[1]^2 - 7)^2  # - исходная функция -
f(x, y) := (x^2 + y - 11)^2 + (x + y^2 - 7)^2
n := 2  # - количество переменных
# Расчитать минимум функции, используя метод LevenbergMarquardt и расчетный блок Given-MinErr
ε := 0.1  # - погрешность вычислений оптимума
x := [-0.5; -3; 3; 3]
y := [-1; 3; -3; 3]  # Начальные приближение координат минимума
Д_С_З := 10  # - диапазон случайных значений элементов генотипа
Given
4*(x^2 + y - 11)*x + 2*x + 2*y^2 - 14 == 0
вся_популяция := 100  # - численность всей популяции
# Ограничения на переменные
2*x^2 + 2*y - 22 + 4*(x + y^2 - 7)*y == 0
процент_обновления := 50
# - количество особей (в процентах от всей популяции), которое заменит новое поколение
Минерр := vectorize(Minerr(x, y))
# Координаты точек минимума
Минерр = [[-3.77931; -2.80512; 3.58443; 3]; [-3.28319; 3.13131; -1.84813; 2]]
количество_новой_популяции := ceil(вся_популяция*процент_обновления/100)
количество_новой_популяции = 50  # - количество особей, которое заменит новое поколение
число_родителей := вся_популяция  # - количество особей, из которых производится отбор
К_М := 5  # - коэффициент мутаций, число на которое изменяется каждый элемент генотипа
процент_мутаций := 50  # - количество особей (в процентах от всей популяции), которое мутирует
количество_мутирующих := ceil(вся_популяция*процент_мутаций/100)
количество_мутирующих = 50  # - количество особей, которое мутирует
# 1. Расчет с использованием пользовательской функции генетический_алгоритм(вся_популяция, Д_С_З, n, f, ε, количество_новой_популяции, число_родителей, количество_мутирующих, К_М)
# Загрузить файл с описанием пользовательских функций
# [reference: Формализованное представление генетического алгоритма оптимизации.xmcd]
[популяция, mins] := генетический_алгоритм(100, 10, 2, f_V, 1, количество_новой_популяции, число_родителей, количество_мутирующих, 5)
популяция = [
    0.443145, 4.01117, 4.92153, 5.48145, 6.18862, 7.16964, 7.23109, 9.21909, 10.8755, 11.0156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;
    2.96863, 3.85335, 2.98325, 3.39927, 3.41556, -2.29117, 3.30192, 3.37569, 3.44684, -4.0344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;
    1.85815, -1.92411, 1.38453, -2.2774, 1.79524, 3.1529, 2.29178, 0.949866, 0.871366, -2.94487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]
mins = [
    4.0988, 7.50775, 7.50775, 7.3761, 7.3761, 1.61578, 1.61578, 1.61578, 1.41811, 1.41811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;
    -3.93388, 3.94141, 3.94141, 3.19636, 3.19636, 3.44889, 3.44889, 3.44889, 2.92381, 2.92381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;
    -3.56997, -2.05563, -2.05563, -1.55794, -1.55794, -2.03036, -2.03036, -2.03036, 1.76212, 1.76212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]
# 2. Построение графиков и точек локального минимума
# Построить трехмерный график в виде контурных линий в диапазоне значений значений -5<x<5, -5<y<5, с шагом 0.1, нанести расчетные точки минимума, отредактировать график как показано ниже.
# Расчет исходной матрицы  для постоения графика функции, используя дискретный аргумент.
x_min := -5
x_max := 5
y_max := 5
y_min := -5
Δy := 0.1
Δx := 0.1
Nx := (x_max - x_min)/Δx
Ny := (y_max - y_min)/Δy
i := 0 .. Nx
j := 0 .. Ny
x[i, j] := x_min + Δx*i
y[i, j] := y_min + Δy*j
M[i, j] := f(x[i, j], y[i, j])
# Преобразование точек. (Преобразование необходимы для построения точек на графике)
Point_2n(x, y, z) := [[x, x]; [y, y]; [z, z]]  # - функция преобразования
P_m := Point_2n(популяция[1, 0], популяция[2, 0], популяция[0, 0])  # - точка минимума алгоритма
# координаты точки минимума
u := 0 .. cols(mins) - 1
P_ex[u] := mins[1, u]
P_ey[u] := mins[2, u]  # - x, y и z составляющие рассчётных точек
P_ez[u] := mins[0, u]
P_rm := [Минерр[0]; Минерр[1]; f(Минерр[0], Минерр[1])]  # - точки минимума
# График поверхности исследуемой функции и полученных расчетных точек
# [component: inputs (x, y, M), (P_ex, P_ey, P_ez), P_m, P_rm]
# График линий уровня исследуемой функции и полученных расчетных точек
# [component: inputs (x, y, M), (P_ex, P_ey, P_ez), P_m, P_rm]
